# OpenSim document version 20302
ScaleTool RepeatabilityModel_moved:
  mass: 75
  height: 1750
  GenericModelMaker:
    model_file: RepeatabilityModel_moved.osim
  ModelScaler:
    apply: false
    scaling_order: measurements manualScale
    marker_file: Kane _Static.trc
    preserve_mass_distribution: true
    output_scale_file: RepeatabilityModel_moved_ScaleSet_Applied.xml
    output_model_file: RepeatabilityModel_calibrated.osim
    MeasurementSet: file=Scale_measurement.xml
    ScaleSet: file=Scale_set.xml
  MarkerPlacer:
    apply: true
    marker_file: Kane _Static.trc
    output_model_file: RepeatabilityModel_calibrated.osim
    max_marker_movement: -1
    IKTaskSet: file=Scale_task.xml
